# OpenSim document version 30000
Model Andrew's Mechanism:
  credits: L.Tagliapietra, M. Vivian, M.Reggiani
  length_units: meters
  force_units: N
  gravity: 0 0 0
  BodySet:
    Body ground: mass=0 mass_center=(0 0 0) inertia_xx=1 inertia_yy=1 inertia_zz=1
    Body OF: mass=0.04325 mass_center=(-0.00258 0 0) inertia_xx=0.1 inertia_yy=0.1 inertia_zz=2.194e-6
        meshes=cylinder.vtp
      PinJoint joint_O: parent_body=ground location_in_parent=(0 0 0) location=(-0.0035 0 0)
        Coordinate joint_O: motion_type=rotational default_value=-0.062
    Body EF: mass=0.00365 mass_center=(0.0025 0 0) inertia_xx=0.1 inertia_yy=0.1 inertia_zz=4.41e-7 meshes=cylinder.vtp
      PinJoint joint_F: parent_body=OF location_in_parent=(0.0035 0 0) location=(0.014 0 0)
        Coordinate joint_F: motion_type=rotational default_value=0
    Body GE: mass=0.00706 mass_center=(-0.00421 0 0) inertia_xx=0.1 inertia_yy=0.1 inertia_zz=5.667e-7
        meshes=cylinder.vtp
      PinJoint joint_E1: parent_body=EF location_in_parent=(-0.014 0 0) location=(0.01 0 0)
        Coordinate joint_E1: motion_type=rotational default_value=-0.7986507
    Body AG: mass=0.0705 mass_center=(0.00308 0.00916 0) inertia_xx=0.1 inertia_yy=0.1 inertia_zz=1.169e-5
        meshes=cylinder.vtp
      PinJoint joint_G: parent_body=GE location_in_parent=(-0.01 0 0) location=(0.02 0 0)
        Coordinate joint_G: motion_type=rotational default_value=1.347951
    Body HE: mass=0.00706 mass_center=(-0.00421 0 0) inertia_xx=0.1 inertia_yy=0.1 inertia_zz=5.667e-7
        meshes=cylinder.vtp
      PinJoint joint_E2: parent_body=EF location_in_parent=(-0.014 0 0) location=(0.01 0 0)
        Coordinate joint_E2: motion_type=rotational default_value=1.069936
    Body AH: mass=0.05498 mass_center=(-0.00772 -0.00449 0) inertia_xx=0.1 inertia_yy=0.1 inertia_zz=1.912e-5
        meshes=cylinder.vtp
      PinJoint joint_H: parent_body=HE location_in_parent=(-0.01 0 0) location=(0.02 0 0)
        Coordinate joint_H: motion_type=rotational default_value=-1.348232
    Body BDE: mass=0.02373 mass_center=(0.00124 0.01043 0) inertia_xx=0.1 inertia_yy=0.1 inertia_zz=5.255e-6
        meshes=triangle.vtp
      PinJoint joint_E3: parent_body=EF location_in_parent=(-0.014 0 0) location=(0.0175 0 0)
        Coordinate joint_E3: motion_type=rotational default_value=-1.053596
  ConstraintSet:
    PointConstraint AGToground: body_1=ground body_2=AG location_body_1=(-0.06934 -0.00227 0)
        location_body_2=(-0.02 0 0)
    PointConstraint AHToground: body_1=ground body_2=AH location_body_1=(-0.06934 -0.00227 0)
        location_body_2=(-0.02 0 0)
    PointConstraint BDEToground: body_1=ground body_2=BDE location_body_1=(-0.03635 0.03273 0)
        location_body_2=(-0.0175 0 0)
  ComponentSet MiscComponents:
    PointToPointSpring spring: body1=ground body2=BDE point1=(0.014 0.072 0) point2=(0.0005 0.02 0)
        stiffness=4530 [N/m] rest_length=0.07785
