# OpenSim document version 30000
Model BricardMechanism:
  credits: L.Tagliapietra, M. Vivian, M.Reggiani
  length_units: meters
  force_units: N
  gravity: 0 -9.81 0
  BodySet:
    Body ground: mass=0 mass_center=(0 0 0) inertia_xx=1 inertia_yy=1 inertia_zz=1
    Body Link_1: mass=1 mass_center=(0 0 0) inertia_xx=0.001666667 inertia_yy=0.08416667 inertia_zz=0.08416667
        meshes=cylinder.vtp
      PinJoint Pin_1: parent_body=ground location_in_parent=(0 0 0) orientation_in_parent=(1.570796 0 0)
          location=(-0.5 0 0) orientation=(1.570796 0 0)
        Coordinate Pin_1: motion_type=rotational default_value=0
    Body Link_2: mass=1 mass_center=(0 0 0) inertia_xx=0.08416667 inertia_yy=0.001666667 inertia_zz=0.08416667
        meshes=cylinder.vtp
      PinJoint Pin_2: parent_body=Link_1 location_in_parent=(0.5 0 0) location=(0 0.5 0)
        Coordinate Pin_2: motion_type=rotational default_value=0
    Body Link_3: mass=1 mass_center=(0 0 0) inertia_xx=0.08416667 inertia_yy=0.08416667 inertia_zz=0.001666667
        meshes=cylinder.vtp
      PinJoint Pin_3: parent_body=Link_2 location_in_parent=(0 -0.5 0) orientation_in_parent=(0 1.570796 0)
          location=(0 0 -0.5) orientation=(0 1.570796 0)
        Coordinate Pin_3: motion_type=rotational default_value=0
    Body Link_4: mass=1 mass_center=(0 0 0) inertia_xx=0.001666667 inertia_yy=0.08416667 inertia_zz=0.08416667
        meshes=cylinder.vtp
      PinJoint Pin_4: parent_body=Link_3 location_in_parent=(0 0 0.5) orientation_in_parent=(1.570796 0 0)
          location=(0.5 0 0) orientation=(1.570796 0 0)
        Coordinate Pin_4: motion_type=rotational default_value=0
    Body Link_5: mass=0.5 mass_center=(0 0 0) inertia_xx=0.01083333 inertia_yy=0.0008333333 inertia_zz=0.01083333
        meshes=cylinder.vtp
      PinJoint Pin_5: parent_body=Link_4 location_in_parent=(-0.5 0 0) location=(0 -0.25 0)
        Coordinate Pin_5: motion_type=rotational default_value=0
    Body Link_6: mass=0.5 mass_center=(0 0 0) inertia_xx=0.01083333 inertia_yy=0.0008333333 inertia_zz=0.01083333
        meshes=cylinder.vtp
      PinJoint Pin_6: parent_body=ground location_in_parent=(0 0 1) orientation_in_parent=(0 1.570796 0)
          location=(0 0.25 0) orientation=(0 1.570796 0)
        Coordinate Pin_6: motion_type=rotational default_value=0
  ConstraintSet:
    WeldConstraint Link_6ToLink_5: body_1=Link_5 body_2=Link_6 location_body_1=(0 0.25 0) orientation_body_1=(0 0 0)
        location_body_2=(0 -0.25 0) orientation_body_2=(0 0 0)
