# OpenSim document version 30000
Model FlyballGovernor:
  credits: L.Tagliapietra, M. Vivian, M.Reggiani
  length_units: meters
  force_units: N
  gravity: 0 0 -9.81
  BodySet:
    Body ground: mass=0 mass_center=(0 0 0) inertia_xx=1 inertia_yy=1 inertia_zz=1
    Body axis: mass=0.3 mass_center=(0 0 0) inertia_xx=0.0250025 inertia_yy=0.0250025 inertia_zz=5e-6 meshes=box.vtp
      PinJoint axisToGround: parent_body=ground location_in_parent=(0 0 0) location=(0 0 -0.5)
        Coordinate axisToGround: motion_type=rotational default_value=0 default_speed_value=6.283185
    Body base: mass=3 mass_center=(0 0 0) inertia_xx=0.005 inertia_yy=0.005 inertia_zz=0.005 meshes=box.vtp
      SliderJoint base: parent_body=axis location_in_parent=(0 0 -0.5) orientation_in_parent=(0 -1.570796 0)
          location=(0 0 0) orientation=(0 -1.570796 0)
        Coordinate baseToAxis: motion_type=translational default_value=0.5 range=(0 1) clamped=true
    Body firstRod: mass=0.3 mass_center=(0 0 0) inertia_xx=0.0250025 inertia_yy=0.0250025 inertia_zz=5e-6
        meshes=box.vtp
      PinJoint firstRodToAxis: parent_body=axis location_in_parent=(0.05 0 0.5) orientation_in_parent=(1.570796 0 0)
          location=(0 0 -0.5) orientation=(1.570796 0 0)
        Coordinate firstRodToAxis: motion_type=rotational default_value=-2.094395
    Body firstPointMass: mass=5 mass_center=(0 0 0) inertia_xx=0 inertia_yy=0 inertia_zz=0 meshes=sphere.vtp
      WeldJoint firstMassTofirstBar: parent_body=firstRod location_in_parent=(0 0 0.5) location=(0 0 0)
    Body secondRod: mass=0.3 mass_center=(0 0 0) inertia_xx=0.0250025 inertia_yy=0.0250025 inertia_zz=5e-6
        meshes=box.vtp
      PinJoint secondRodToAxis: parent_body=axis location_in_parent=(-0.05 0 0.5) orientation_in_parent=(1.570796 0 0)
          location=(0 0 -0.5) orientation=(1.570796 0 0)
        Coordinate secondRodToAxis: motion_type=rotational default_value=2.094395
    Body secondPointMass: mass=5 mass_center=(0 0 0) inertia_xx=0 inertia_yy=0 inertia_zz=0 meshes=sphere.vtp
      WeldJoint secondMassToSecondRod: parent_body=secondRod location_in_parent=(0 0 0.5) location=(0 0 0)
  ForceSet:
    ExpressionBasedPointToPointForce Spring-Damper_01: body1=base body2=firstRod point1=(0.05 0 0) point2=(0 0 0)
        expression=800000*(d-0.5)+40000*ddot
    ExpressionBasedPointToPointForce Spring-Damper_02: body1=base body2=secondRod point1=(-0.05 0 0) point2=(0 0 0)
        expression=800000*(d-0.5)+40000*ddot
