# OpenSim document version 30000
Model 2-FourBarMechanism:
  credits: L.Tagliapietra, M. Vivian, M.Reggiani
  length_units: meters
  force_units: N
  gravity: 0 -9.81 0
  BodySet:
    Body ground: mass=0 mass_center=(0 0 0) inertia_xx=1 inertia_yy=1 inertia_zz=1
    Body Link_1: mass=1 mass_center=(0 0 0) inertia_xx=0.08333333 inertia_yy=0 inertia_zz=0.08333333
        meshes=cylinder.vtp
      PinJoint A0: parent_body=ground location_in_parent=(0 0 0) location=(0 -0.5 0)
        Coordinate A0: motion_type=rotational default_value=0 default_speed_value=-1
    Body Link_2: mass=1 mass_center=(0 0 0) inertia_xx=0 inertia_yy=0.08333333 inertia_zz=0.08333333
        meshes=cylinder.vtp
      PinJoint VB0: parent_body=Link_1 location_in_parent=(0 0.5 0) location=(-0.5 0 0)
        Coordinate VB0: motion_type=rotational default_value=0 default_speed_value=1
    Body Link_3: mass=1 mass_center=(0 0 0) inertia_xx=0.08333333 inertia_yy=0 inertia_zz=0.08333333
        meshes=cylinder.vtp
      PinJoint B1: parent_body=Link_2 location_in_parent=(0.5 0 0) location=(0 0.5 0)
        Coordinate B1: motion_type=rotational default_value=0 default_speed_value=-1
    Body Link_4: mass=1 mass_center=(0 0 0) inertia_xx=0 inertia_yy=0.08333333 inertia_zz=0.08333333
        meshes=cylinder.vtp
      PinJoint VB1: parent_body=Link_3 location_in_parent=(0 0.5 0) location=(-0.5 0 0)
        Coordinate VB1: motion_type=rotational default_value=0 default_speed_value=1
    Body Link_5: mass=1 mass_center=(0 0 0) inertia_xx=0.08333333 inertia_yy=0 inertia_zz=0.08333333
        meshes=cylinder.vtp
      PinJoint B2: parent_body=Link_4 location_in_parent=(0.5 0 0) location=(0 0.5 0)
        Coordinate B2: motion_type=rotational default_value=0 default_speed_value=-1
  ConstraintSet:
    PointConstraint Link_3Toground: body_1=ground body_2=Link_3 location_body_1=(1 0 0) location_body_2=(0 -0.5 0)
    PointConstraint Link_5Toground: body_1=ground body_2=Link_5 location_body_1=(2 0 0) location_body_2=(0 -0.5 0)
