# OpenSim document version 30000
Model SimplePendulumMechanism:
  credits: L.Tagliapietra, M. Vivian, M.Reggiani
  length_units: meters
  force_units: N
  gravity: 0 -9.81 0
  BodySet:
    Body ground: mass=0 mass_center=(0 0 0) inertia_xx=1 inertia_yy=1 inertia_zz=1
    Body Point: mass=1 mass_center=(0 0 0) inertia_xx=0 inertia_yy=0 inertia_zz=0 meshes=(sphere.vtp cylinder.vtp)
      PinJoint theta: parent_body=ground location_in_parent=(0 0 0) location=(0 1 0)
        Coordinate theta: motion_type=rotational default_value=-1.570796
